// COMSOL Multiphysics 5.4.0.225 model "BeTSSi_mod2_BEM_res1.mph"
// Outline of the model tree

Parameters
  P_inc = 1[Pa]  // Amplitude of incident wave
  E = 2.1e11[Pa]  // Young's modulus
  nu = 0.3  // Poisson's ratio
  rho_s = 7850[kg/m^3]  // Density of solid
  rho_f = 1000[kg/m^3]  // Density of water
  c_f = 1500[m/s]  // Speed of sound in water
  t = 0.01[m]  // Thickness of pressure hull
  L = 42[m]  // Length of the deck
  a = 7[m]  // Semi-major axis of bow
  f = 1000[Hz]  // Frequency
  lambda = c_f/f  // Wave length
  resolution = 1  // Mesh resolution
  alpha_s = 270*pi/180  // Aspect angle
  beta_s = 0*pi/180  // Elevation angle
  h_max = lambda/resolution  // Maximal element size

Functions
  int1: Interpolation "BEM"
    funcname = BEM
    table = 
      {0, 1.53229371141}
      {0.05, 1.54594916497}
      {0.1, 1.55959696924}
      {0.15, 1.57323707665}
      {0.2, 1.58686943979}
      {0.25, 1.6004940114}
      {0.3, 1.6141107443037}
      {0.35, 1.62771959145}
      {0.4, 1.64132050583}
      {0.45, 1.65491344052}
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
Selections
  sel3: Explicit "SHBC" on all boundaries

Geometry
  geom1 "Geometry 1" (3D, length unit m)
    imp1: Import "RhinoGeometry"
      type = cad
      filename = C:\Users\Zetison\Dropbox\work\rhinoceros\BeTSSi\BeTSSi_mod2.igs
      unit = source
      fillholes = on
    fin: Finalize "Form Union"

Materials
  mat1: Common "Water, liquid" on all domains
    def "Basic"
      dynamicviscosity = eta(T[1/K])[Pa*s]
      ratioofspecificheat = 1.0
      electricconductivity = 5.5e-6[S/m]
      heatcapacity = Cp(T[1/K])[J/(kg*K)]
      density = rho_f
      thermalconductivity = k(T[1/K])[W/(m*K)]
      soundspeed = c_f
      eta: Piecewise
        arg = T
        pieces = 
          {273.15, 413.15, 1.3799566804-0.021224019151*T^1+1.3604562827E-4*T^2-4.6454090319E-7*T^3+8.9042735735E-10*T^4-9.0790692686E-13*T^5+3.8457331488E-16*T^6}
          {413.15, 553.75, 0.00401235783-2.10746715E-5*T^1+3.85772275E-8*T^2-2.39730284E-11*T^3}
      Cp: Piecewise | arg = T; pieces = {273.15, 553.75, 12010.1471-80.4072879*T^1+0.309866854*T^2-5.38186884E-4*T^3+3.62536437E-7*T^4}
      rho: Piecewise | arg = T; pieces = {273.15, 553.75, 838.466135+1.40050603*T^1-0.0030112376*T^2+3.71822313E-7*T^3}
      k: Piecewise | arg = T; pieces = {273.15, 553.75, -0.869083936+0.00894880345*T^1-1.58366345E-5*T^2+7.97543259E-9*T^3}
      cs: Interpolation | table = {{273, 1403}, {278, 1427}, {283, 1447}, {293, 1481}, {303, 1507}, {313, 1526}, {323, 1541}, {333, 1552}, {343, 1555}, {353, 1555}, {363, 1550}, {373, 1543}}; interp = piecewisecubic

Physics
  pabe: PressureAcousticsBoundaryElements on all domains
    dependent variable p2
    bpam1: BoundaryElementsPressureAcousticsModel "Pressure Acoustics 1" (default)
    shb1: SoundHard "Sound Hard Boundary (Wall) 1" (default)
    init1: init2 "Initial Values 1" (default)
    shb2: SoundHard "Sound Hard Boundary (Wall) 2" on selection sel3

Mesh
  mesh1 "Mesh 1"
    size: MeshSizeDefault | hmax = h_max; hmin = h_max/10; hnarrow = 0; hgrad = 1.5; custom = on
    ftri1: FreeTri "Free Triangular 1" on selection sel3

Studies
  std1 "Study 1"
    param: Parametric "Parametric Sweep" | sweeptype = filled; pname = resolution; plistarr = 10,20,40,80; keepsol = all
    freq: Frequency "Frequency Domain" | plist = f

Solver configurations
  sol1 "Solution 1" (study std1)
    v1: Variables "Dependent Variables 1"
    s1: Stationary "Stationary Solver 1"
      fc1: FullyCoupled | linsolver = i1
      i1: Iterative "Suggested Iterative Solver (GMRES with GMG) (acpr)" | irestol = 0.000001
        mg1: Multigrid
  sol2 "Parametric Solutions 1" (study std1)

Datasets
  dset1: Solution | solution = sol1
  mesh1: Mesh | mesh = mesh1
  dset2: Solution | solution = none
  dset3: Solution | solution = sol2

Plots
  pg2: PlotGroup3D "Acoustic pressure" | data = dset1
    slc1: Slice "xy-plane" (disabled) | expr = acpr.p_s; quickplane = xy; quickz = 1; quickznumber = 1
    slc2: Slice "xy-plane abs"
      expr = abs(acpr.p_b+acpr.p_s)
      quickplane = xy
      quickzmethod = coord
      quickz = 2
      quickznumber = 3
  pg3: PlotGroup3D "3D mesh quality plot" | data = dset1
    mesh1: Mesh | meshdomain = volume
  pg4: PlotGroup1D "Far field plots" | data = none; xlabel = Aspect angle; ylabel = TS
    ff1: RadiationPattern "Far Field PML"
      data = dset3
      expr = 20*log10(abs(acpr.ffc1.pfar)/abs(P_inc))
      title = Target strength
      phidisc = 7199
      radius = cos(beta_s)
      center3 = {0, 0, sin(beta_s)}
    ff2: RadiationPattern "BEM solution"
      data = dset1
      expr = comp1.BEM((atan2(y,x)+2*pi*(y<0))*180/pi)
      phidisc = 7199
      circle = manual
      legends = BEM solution

Exports
  plot1: Plot "Export far field plots" | filename = BeTSSi_mod/BC.txt